// COMSOL Multiphysics 6.0.0.405 model "1D_membrane.mph"
// Outline of the model tree

Parameters
  W = 10[mm]
  f = 100 [N/m^3]

Geometry
  geom1 "Geometry 1" (1D, length unit m)
    i1: Interval | coord = {0, W}
    pt1: Point | p = W/2
    fin: Finalize "Form Union"

Physics
  poeq: PoissonEquation "Poisson's Equation" on all domains
    dependent variable u
    EquationForm.freq_src = fromSolver
    Units.DependentVariableQuantity = displacement
    Units.SourceTermQuantity = forcedensity
    Units.CustomSourceTermUnit = N/m^3
    peq1: PoissonEquation "Poisson's Equation 1" (default) | f = f; c = 1 + 0.9*sin(sqrt(2) * pi * x / W)
    zflx1: ZeroFluxBoundary "Zero Flux 1" (default)
    init1: init "Initial Values 1" (default)
    dir1: DirichletBoundary "Dirichlet Boundary Condition 1" on boundaries 1, 3 | r = 0

Mesh
  mesh1 "Mesh 1"
    size: MeshSizeDefault | hmax = W/2; custom = on
    auto_f1: Edge on remaining entities

Studies
  std1 "Study 1"
    stat: Stationary | loadcase = Load case 1

Solver configurations
  sol1 "Solution 1" (study std1)
    v1: Variables "Dependent Variables 1"
    s1: Stationary "Stationary Solver 1"
      dDef: Direct
      fc1: FullyCoupled | linsolver = dDef

Datasets
  dset1: Solution | solution = sol1

Derived values
  pev1: EvalPoint "Point Evaluation 1" on boundaries 2 | data = dset1; table = tbl1; expr = u

Tables
  tbl1: Table
    // Point Evaluation 1
    Dependent variable u (m), Point: 2 | Dependent variable u (m), Point: 2 | Dependent variable u (m), Point: 2
    0.00150112 | 0.00150112 | 0.00136974

Plots
  pg1: PlotGroup1D "1D Plot Group 1" | data = dset1
    lngr1: LineGraph on all domains | expr = u; xdata = expr; xdataexpr = x

Exports
  data1: Data | data = dset1; expr = u; filename = \\file\Userst$\tmi58\Home\Downloads\1D_membrane.txt